// COMSOL Multiphysics 6.2.0.339 model "Hook_2019.mph"
// Outline of the model tree

Parameters
  h_beam = 10[mm]
  l_beam = 370[mm] - l_abh
  b_beam = 40[mm]
  h_tip = 0.71[mm]
  l_abh = 70[mm]
  b_abh = 40[mm]
  power_law = 4
  eta_d = 0.2  // Damping Coef (Added Layer)
  eta_b = 1e-4  // Damping Coef (Added Layer)
  h_d = 1[mm]
  Profile_Type = 1

Functions
  an1: Analytic "Power Law" | funcname = h_ABH; expr = if(x <= l_beam, h_beam, (h_beam - h_tip) * ((l_beam + l_abh - x)/l_abh)^power_law + h_tip); fununit = m; argunit = m
  an2: Analytic "Exponential Profile" | funcname = h_ABH2; expr = if(x <= l_beam, h_beam, h_tip * exp(((l_beam + l_abh - x)/l_abh) * log(h_beam/h_tip))); fununit = m; argunit = m
  an3: Analytic "Trigonometric Profile" | funcname = h_ABH3; expr = if(x <= l_beam, h_beam, h_tip + (h_beam - h_tip) * (sin(pi * (l_beam + l_abh - x) / (2 * l_abh)))^2); fununit = m; argunit = m
  an4: Analytic | funcname = Beam_Height; expr = if(Profile_Type == 1, h_ABH(x), if(Profile_Type == 2, h_ABH2(x), h_ABH3(x))); fununit = m; argunit = m

Variables
  var1 "Variables 1"
    omega = 2*pi*freq  // Angular frequency
    dx = 0.02[m]
    kf = ((2710[kg/m^3] * b_beam * h_beam * omega^2) / (70[GPa] * (b_beam * h_beam^3)/12))^(1/4)
    R_coeff = abs( (w_dot2 * exp(i * kf * dx / 2) - w_dot1 * exp(-i * kf * dx / 2)) / (w_dot1 * exp(i * kf * dx / 2) - w_dot2 * exp(-i * kf * dx / 2)) )

Probes
  point1: Point "Point Probe 1" on points 3 | probename = w_dot1; expr = i * 2 * pi * freq * v; unit = m/s; table = tbl1
  point2: Point "Point Probe 2" on points 4 | probename = w_dot2; expr = i * 2 * pi * freq * v; unit = m/s; table = tbl1

Common definitions
  mpf1: ParticipationFactors

Geometry
  geom1 "Geometry 1" (2D, length unit m)
    pol2: Polygon | type = open; source = table; table = {{0, 0}, {0.3, 0}, {0.37, 0}}
    pt1: Point "Excitation Poin4" | p = {0.02, 0}
    pt2: Point "Sens1" | p = {0.16, 0}
    pt3: Point "Sens2" | p = {0.18, 0}
    fin: Finalize "Form Union"

Materials
  mat1: Common "6082 [solid,T6 temper, extrusion]" on all boundaries
    def "Basic"
      thermalconductivity = 172[W/(m*K)]
      resistivity = 3.9E-8[Ω*m]
      heatcapacity = 896.999999[J/(kg*K)]
      electricconductivity = 3.9E-8[S/m]
      density = 2700[kg/m^3]
      TD = 7.075656E-5
    Enu "Young's modulus and Poisson's ratio"
      E = 70e9
      nu = 0.33

Physics
  beam: HermitianBeam on all boundaries
    dependent variable u = {u, v, w}
    BeamFormulation.BeamFormulation = Timoshenko
    StructuralTransientBehavior.StructuralTransientBehavior = Quasistatic
    emm1: Elastic "Linear Elastic Material 1" (default) | IsotropicOption = Enu; ForceLinearStrainRes = 1
      dmp1: Damping on boundaries 5 | DampingType = IsotropicLossFactor; eta_s_mat = userdef; eta_s = eta_d
      dmp2: Damping on boundaries 1-4 | DampingType = IsotropicLossFactor; eta_s_mat = userdef; eta_s = eta_b
    csd1: CrossSectionBeam "Cross-Section Data 1" (default)
      SectionType = UserDefined
      hy_rect = h_ABH(x)
      hz_rect = b_beam
      area = Beam_Height(x)*b_beam
      Izz = 1/12*Beam_Height(x)^3 *b_beam
      BeamStressEvalMethod = BeamStressSection
      hy = Beam_Height(x)
      muy = 6/5
      kappay = 0.9
    free1: Free (default)
    init1: init "Initial Values 1" (default) | coordinateSystem = GlobalSystem
    pl1: PointLoad on points 2 | Fp = {0, -1, 0}
    adm1: AddedMass1 on boundaries 5 | MassType = mTot; mPerVolume = 19.1[g]; mTot = 19.1[g]; ExcludeFromMassForces = 0

Mesh
  mesh1 "Mesh 1"
    size: MeshSizeDefault | hmax = 0.0001; hauto = 2; custom = on
    edg3: Edge on boundaries 5
      size1: Size on boundaries 5 | hmax = 0.0003; hauto = 1; custom = on
    edg2: Edge on remaining entities
      size1: Size on entire geometry | hauto = 2

Studies
  std1 "Study 1"
    freq: Frequency "Frequency Domain"
      plist = range(10,25,10e3)
      preusesol = yes
      errestandadap = none
      meshadaptmethod = modify
      sweeptype = filled

Solver configurations
  sol1 "Solution 1" (study std1)
    v1: Variables "Dependent Variables 1"
    s1: Stationary "Stationary Solver 1" | linpmethod = sol
      dDef: Direct
      p1: Parametric | pname = freq; plistarr = range(10,25,10e3); punit = Hz; pcontinuationmode = no
      fc1: FullyCoupled | linsolver = dDef

Datasets
  dset1: Solution | solution = sol1
  dset2: Solution "Probe Solution 2" | solution = sol1
  avh1: Average "Point Probe 1" on points 3 | data = dset2
  avh2: Average "Point Probe 2" on points 4 | data = dset2

Derived values
  pev1: EvalPoint "Point Probe 1" | data = avh1; table = tbl1; expr = i * 2 * pi * freq * v
  pev2: EvalPoint "Point Probe 2" | data = avh2; table = tbl1; expr = i * 2 * pi * freq * v

Tables
  tbl1: Table "Probe Table 1"
    freq (Hz) | i * 2 * pi * freq * v (m/s), Point Probe 1 | i * 2 * pi * freq * v (m/s), Point Probe 2
    1000 | 8.83639e-05-0.000334956i | 2.78778e-05-0.000954588i
    1025 | 0.000113588-0.00026926i | 2.87159e-05-0.000961254i
    1050 | 0.000152975-0.000194884i | 2.78644e-05-0.000980454i
    1075 | 0.000217829-0.000108386i | 2.21329e-05-0.00101692i
    1100 | 0.000331447-9.55152e-06i | 2.85853e-06-0.00107839i
    1125 | 0.000541182+8.15598e-05i | -5.42769e-05-0.00117342i
    1150 | 0.000911005+5.66128e-05i | -0.000209588-0.00128411i
    1175 | 0.00130132-0.000356561i | -0.000504691-0.00126393i
    1200 | 0.00117031-0.000985384i | -0.000683941-0.000992423i
    1225 | 0.000740222-0.00121165i | -0.000619535-0.000770549i
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
Plots
  pg1: PlotGroup2D "Stress (beam)" | data = dset1
    line1: Line | expr = beam.mises; linetype = tube; radiusexpr = beam.re
      def: Deform "Deformation" | expr = {u, v}; descr = Displacement field
  pg3: PlotGroup1D "Reflection Coefficient"
    data = dset1
    phasetype = manual
    manualgrid = on
    xspacing = 500
    yspacing = 0.1
    glob1: Global
      data = dset1
      expr = (R_coeff>= 0 && R_coeff <= 1)*R_coeff
      xdata = expr
      xdataexpr = freq
      legends = Power Law
  pg4: PlotGroup1D "Probe Plot Group 4" | data = dset1
    tblp1: Table "Probe Table Graph 1" | table = tbl1